** v @ node 1 = 22.3


*Node,Nset=Nall
      1,          48.,          52.,           0.
      2,          24.,          37.,           0.
      3,          24.,          22.,           0.
      4,          48.,          50.,           0.
      5,          48.,          48.,           0.
      6,          48.,          46.,           0.
      7,          48.,          44.,           0.
      8,           0.,          22.,           0.
      9,          24.,          52.,           0.
     10,           0.,          44.,           0.
     11,           0.,           0.,           0.
     12,          48.,          54.,           0.
     13,          48.,          56.,           0.
     14,          48.,          58.,           0.
     15,          48.,          60.,           0.
     16,          42.,        48.25,           0.
     17,          36.,         44.5,           0.
     18,          30.,        40.75,           0.
     19,          24.,        33.25,           0.
     20,          24.,         29.5,           0.
     21,          24.,        25.75,           0.
     22,          30.,         27.5,           0.
     23,          36.,          33.,           0.
     24,          42.,         38.5,           0.
     25,           6.,        25.75,           0.
     26,          12.,         29.5,           0.
     27,          18.,        33.25,           0.
     28,          24.,        40.75,           0.
     29,          24.,         44.5,           0.
     30,          24.,        48.25,           0.
     31,          18.,          50.,           0.
     32,          12.,          48.,           0.
     33,           6.,          46.,           0.
     34,           0.,         38.5,           0.
     35,           0.,          33.,           0.
     36,           0.,         27.5,           0.
     37,           0.,         16.5,           0.
     38,           0.,          11.,           0.
     39,           0.,          5.5,           0.
     40,           6.,          5.5,           0.
     41,          12.,          11.,           0.
     42,          18.,         16.5,           0.
     43,          42.,          58.,           0.
     44,          36.,          56.,           0.
     45,          30.,          54.,           0.
     46,          42.,      45.8125,           0.
     47,          36.,       41.625,           0.
     48,          30.,      37.4375,           0.
     49,          42.,       43.375,           0.
     50,          36.,        38.75,           0.
     51,          30.,       34.125,           0.
     52,          42.,      40.9375,           0.
     53,          36.,       35.875,           0.
     54,          30.,      30.8125,           0.
     55,           6.,      30.8125,           0.
     56,          12.,       34.125,           0.
     57,          18.,      37.4375,           0.
     58,           6.,       35.875,           0.
     59,          12.,        38.75,           0.
     60,          18.,       41.625,           0.
     61,           6.,      40.9375,           0.
     62,          12.,       43.375,           0.
     63,          18.,      45.8125,           0.
     64,          18.,      29.0625,           0.
     65,          12.,       24.875,           0.
     66,           6.,      20.6875,           0.
     67,          18.,       24.875,           0.
     68,          12.,        20.25,           0.
     69,           6.,       15.625,           0.
     70,          18.,      20.6875,           0.
     71,          12.,       15.625,           0.
     72,           6.,      10.5625,           0.
     73,          30.,      44.0625,           0.
     74,          36.,       47.375,           0.
     75,          42.,      50.6875,           0.
     76,          30.,       47.375,           0.
     77,          36.,        50.25,           0.
     78,          42.,       53.125,           0.
     79,          30.,      50.6875,           0.
     80,          36.,       53.125,           0.
     81,          42.,      55.5625,           0.
*Element, type=us3, ELSET=Eall
 1,  1, 16,  4
 2, 16, 46,  4
 3, 16, 17, 46
 4, 17, 47, 46
 5, 17, 18, 47
 6, 18, 48, 47
 7, 18,  2, 48
 8,  2, 19, 48
 9,  4, 46,  5
10, 46, 49,  5
11, 46, 47, 49
12, 47, 50, 49
13, 47, 48, 50
14, 48, 51, 50
15, 48, 19, 51
16, 19, 20, 51
17,  5, 49,  6
18, 49, 52,  6
19, 49, 50, 52
20, 50, 53, 52
21, 50, 51, 53
22, 51, 54, 53
23, 51, 20, 54
24, 20, 21, 54
25,  6, 52,  7
26, 52, 24,  7
27, 52, 53, 24
28, 53, 23, 24
29, 53, 54, 23
30, 54, 22, 23
31, 54, 21, 22
32, 21,  3, 22
33,  8, 25, 36
34, 25, 55, 36
35, 25, 26, 55
36, 26, 56, 55
37, 26, 27, 56
38, 27, 57, 56
39, 27,  2, 57
40,  2, 28, 57
41, 36, 55, 35
42, 55, 58, 35
43, 55, 56, 58
44, 56, 59, 58
45, 56, 57, 59
46, 57, 60, 59
47, 57, 28, 60
48, 28, 29, 60
49, 35, 58, 34
50, 58, 61, 34
51, 58, 59, 61
52, 59, 62, 61
53, 59, 60, 62
54, 60, 63, 62
55, 60, 29, 63
56, 29, 30, 63
57, 34, 61, 10
58, 61, 33, 10
59, 61, 62, 33
60, 62, 32, 33
61, 62, 63, 32
62, 63, 31, 32
63, 63, 30, 31
64, 30,  9, 31
65,  2, 27, 19
66, 27, 64, 19
67, 27, 26, 64
68, 26, 65, 64
69, 26, 25, 65
70, 25, 66, 65
71, 25,  8, 66
72,  8, 37, 66
73, 19, 64, 20
74, 64, 67, 20
75, 64, 65, 67
76, 65, 68, 67
77, 65, 66, 68
78, 66, 69, 68
79, 66, 37, 69
80, 37, 38, 69
81, 20, 67, 21
82, 67, 70, 21
83, 67, 68, 70
84, 68, 71, 70
85, 68, 69, 71
86, 69, 72, 71
87, 69, 38, 72
88, 38, 39, 72
89, 21, 70,  3
90, 70, 42,  3
91, 70, 71, 42
92, 71, 41, 42
93, 71, 72, 41
94, 72, 40, 41
95, 72, 39, 40
96, 39, 11, 40
 97,  2, 18, 28
 98, 18, 73, 28
 99, 18, 17, 73
100, 17, 74, 73
101, 17, 16, 74
102, 16, 75, 74
103, 16,  1, 75
104,  1, 12, 75
105, 28, 73, 29
106, 73, 76, 29
107, 73, 74, 76
108, 74, 77, 76
109, 74, 75, 77
110, 75, 78, 77
111, 75, 12, 78
112, 12, 13, 78
113, 29, 76, 30
114, 76, 79, 30
115, 76, 77, 79
116, 77, 80, 79
117, 77, 78, 80
118, 78, 81, 80
119, 78, 13, 81
120, 13, 14, 81
121, 30, 79,  9
122, 79, 45,  9
123, 79, 80, 45
124, 80, 44, 45
125, 80, 81, 44
126, 81, 43, 44
127, 81, 14, 43
128, 14, 15, 43
*USER ELEMENT,TYPE=us3,NODES=3,INTEGRATION POINTS=3,MAXDOF=6


*USER SECTION,ELSET=Eall,MATERIAL=Material-1,CONSTANTS=6
1.0

*Nset, nset=Set-1,
  8, 10, 11
*Nset, nset=Set-2,
 7,
*Nset, nset=Set-3,
 7,
*Nset, nset=Set-4,
  8, 10, 11, 34, 35, 36, 37, 38, 39
*Nset, nset=Set-5,
 7,
*Nset, nset=Set-6, instance=Part-1-1
  1,  4,  5,  6,  7, 12, 13, 14, 15


**
** MATERIALS
**
*Material, name=Material-1
*Density
1.,
*Elastic
1., 0.333333
** ----------------------------------------------------------------
**
** STEP: Step-1
**
*Step, name=Step-1, nlgeom=NO
*Static
1., 1., 1e-05, 1.
**
** BOUNDARY CONDITIONS
**
** Name: BC-2 Type: Displacement/Rotation
*Boundary
Set-4, 1, 1
Set-4, 2, 2
Set-4, 3, 3
Set-4, 4, 4
Set-4, 5, 5
Set-4, 6, 6
**
** LOADS
**
** Name: Load-4   Type: Concentrated force
*Cload
Set-6, 2, 0.111111

**
** OUTPUT REQUESTS
**
*NODE PRINT,NSET=Nall
U
*EL PRINT,ELSET=Eall
S
*EL FILE
SNEG,SMID,SPOS
*NODE FILE
U,RF

*End Step
